from ast import mod
from pyexpat import model
from turtle import mode
import Sofa
import math

from wholeGripperController import WholeGripperController

youngModulusFingers = 600
youngModulusStiffLayerFingers = 1500

rotation1 = [120, 0, 0]
rotation2 = [0, 0, 0]
rotation3 = [240, 0, 0]
rotations = [rotation1, rotation2, rotation3]

translateFinger1 = [0, 0, 0]
translations = [translateFinger1]

angles = [0]

def Floor(parentNode, color=[0.5, 0.5, 0.5, 1.], rotation=[0, 0, 0], translation=[-500, -500, -20]):
    floor = parentNode.addChild('Floor')
    floor.addObject('MeshOBJLoader', name='loader', filename='mesh/square1.obj', triangulate=True, scale=1000, rotation=rotation,
                    translation=translation)
    floor.addObject('OglModel', src='@loader', color=color)
    floor.addObject('MeshTopology', src='@loader', name='topo')
    floor.addObject('MechanicalObject', src='@loader')
    floor.addObject('TriangleCollisionModel', simulated=False, moving=False)
    floor.addObject('LineCollisionModel', simulated=False, moving=False)
    floor.addObject('PointCollisionModel', simulated=False, moving=False)
    return floor


class SnakeRobot:


    def __init__(self, parentNode, youngModulus=600, poissonRation=0.3):

        for i in range(1):
            self.node = parentNode.addChild('finger' + str(i + 1))
            self.node.addObject('EulerImplicitSolver', name='odesolver', rayleighStiffness=0.1, rayleighMass=0.1)
            self.node.addObject('SparseLDLSolver')
            self.node.addObject("GenericConstraintCorrection", solverName="SparseLDLSolver")
            self.node.addObject('MeshVTKLoader', name='loader', filename='data/mesh/snake_out.vtk',
                                rotation=[0, 0, 0], translation=[0, 0, 0])
            self.node.addObject('MeshTopology', src='@loader', name='container')
            self.node.addObject('MechanicalObject', name='tetras', template='CudaVec3', showObject=True, showObjectScale=1, showIndices=True, showIndicesScale=4e-5)
            self.node.addObject('UncoupledConstraintCorrection')
            self.node.addObject('UniformMass', totalMass=0.01)
            self.node.addObject('TetrahedronFEMForceField', template='Vec3', name='FEM', method='large', poissonRatio=poissonRation,
                                       youngModulus=youngModulus)

            self.node.addObject('LinearSolverConstraintCorrection', solverName='SparseLDLSolver')


            self.__addCavity()

    def __addCavity(self):
        for j in range(3):
            cavity = self.node.addChild('cavity' + str(j+1))
            cavity.addObject('MeshVTKLoader', name='loader', filename='data/mesh/snake_in.vtk',
                        translation=[0, 0, 0], rotation=[rotations[j]], scale=1.0)
            cavity.addObject('MeshTopology', src='@loader', name='topo')
            cavity.addObject('MechanicalObject', name='cavity')
            cavity.addObject('UncoupledConstraintCorrection')
            cavity.addObject('SurfacePressureConstraint', name='SurfacePressureConstraint', template='Vec3', value=0.0001,
                        triangles='@topo.triangles', valueType='pressure')
            cavity.addObject('BarycentricMapping', name='mapping')

    def addCollisionModel(self):
        modelContact = self.node.addChild('collisionFinger')
        modelContact.addObject('MeshSTLLoader', name='loader', filename='data/mesh/snake_out.stl',
                                translation=translations[0], rotation=[0, 0, 0])
        modelContact.addObject('MeshTopology', src='@loader', name='topo')
        modelContact.addObject('MechanicalObject', name='collisMech')
        modelContact.addObject('UncoupledConstraintCorrection')
        modelContact.addObject('TriangleCollisionModel', selfCollision=False)
        modelContact.addObject('LineCollisionModel', selfCollision=False)
        modelContact.addObject('PointCollisionModel', selfCollision=False)
        modelContact.addObject('BarycentricMapping')


def createScene(rootNode):

    INVERSE = True

    rootNode.addObject('RequiredPlugin', pluginName=['SoftRobots', 'SofaPython3', 'SofaCUDA',
                                                     "Sofa.Component.AnimationLoop",
                                                     # Needed to use components FreeMotionAnimationLoop
                                                     "Sofa.Component.Collision.Detection.Algorithm",
                                                     # Needed to use components BVHNarrowPhase, BruteForceBroadPhase, DefaultPipeline
                                                     "Sofa.Component.Collision.Detection.Intersection",
                                                     # Needed to use components LocalMinDistance
                                                     "Sofa.Component.Collision.Geometry",
                                                     # Needed to use components LineCollisionModel, PointCollisionModel, TriangleCollisionModel
                                                     "Sofa.Component.Collision.Response.Contact",
                                                     # Needed to use components DefaultContactManager
                                                     "Sofa.Component.Constraint.Lagrangian.Correction",
                                                     # Needed to use components GenericConstraintCorrection, UncoupledConstraintCorrection
                                                     "Sofa.Component.Constraint.Lagrangian.Solver",
                                                     # Needed to use components GenericConstraintSolver
                                                     "Sofa.Component.IO.Mesh",
                                                     # Needed to use components MeshOBJLoader, MeshSTLLoader, MeshVTKLoader
                                                     "Sofa.Component.LinearSolver.Direct",
                                                     # Needed to use components SparseLDLSolver
                                                     "Sofa.Component.LinearSolver.Iterative",
                                                     # Needed to use components CGLinearSolver
                                                     "Sofa.Component.Mass",  # Needed to use components UniformMass
                                                     "Sofa.Component.ODESolver.Backward",
                                                     # Needed to use components EulerImplicitSolver
                                                     "Sofa.Component.SolidMechanics.FEM.Elastic",
                                                     # Needed to use components TetrahedronFEMForceField
                                                     "Sofa.Component.Topology.Container.Constant",
                                                     # Needed to use components MeshTopology
                                                     "Sofa.Component.Topology.Container.Dynamic",
                                                     # Needed to use components TetrahedronSetTopologyContainer, TetrahedronSetTopologyModifier
                                                     "Sofa.Component.Visual",  # Needed to use VisualStyle
                                                     "Sofa.GL.Component.Rendering3D",
                                                     # Needed to use OglModel
                                                     "Sofa.GUI.Component",  # Needed to use AttachBodyButtonSetting
                                                     ])
    rootNode.addObject('VisualStyle',
                       displayFlags='showVisualModels hideBehaviorModels hideCollisionModels hideBoundingCollisionModels hideForceFields showInteractionForceFields hideWireframe showBehavior')

    rootNode.findData('gravity').value = [0, 0, -9810]
    rootNode.findData('dt').value = 0.01

    rootNode.addObject('FreeMotionAnimationLoop')
    rootNode.addObject('GenericConstraintSolver', tolerance=1e-12, maxIterations=10000)
    rootNode.addObject('EulerImplicitSolver', name='odesolver', rayleighStiffness=0.01, rayleighMass=0.1)
    rootNode.addObject('DefaultPipeline')
    rootNode.addObject('BruteForceBroadPhase')
    rootNode.addObject('BVHNarrowPhase')

    rootNode.addObject('DefaultVisualManagerLoop')
    rootNode.addObject('AttachBodyButtonSetting', stiffness=10)

    if INVERSE:
        rootNode.addObject('RequiredPlugin', name='SoftRobots.Inverse')
        rootNode.addObject('QPInverseProblemSolver', epsilon=2e-0, maxIterations=2500, tolerance=1e-7,
                           responseFriction=0.8)
    else:
        rootNode.addObject('GenericConstraintSolver', maxIterations=500, tolerance=1e-5)


    # Contact detection methods
    rootNode.addObject('DefaultPipeline')
    rootNode.addObject('BruteForceBroadPhase')
    rootNode.addObject('BVHNarrowPhase')
    rootNode.addObject('DefaultContactManager', response="FrictionContactConstraint", responseParams="mu=0.8")
    rootNode.addObject('LocalMinDistance', alarmDistance=5, contactDistance=1, angleCone=0.0)

    Floor(rootNode)

    snakerobot = SnakeRobot(rootNode)

    snakerobot.addCollisionModel()


    rootNode.addObject(WholeGripperController(node=rootNode))

    return rootNode
